# DESIGN of TRANSFORMER
#
# Specifications:
# VA Rating = 102V*A
# Primary Voltage = 220V
# Secondary Voltage = 102V
# Frequency = 50Hz
# Winding Material = Copper
# Curent density for copper = 2.5-3.5
# Winding Factor for copper, k=0.37-0.45
#
# To Determine:
# 1.  Primary Coil Working Current density.
# 2.  Window Height.
# 3.  Secondary Coil Working Current density.
# 4.  Core Diameter.
# 5.  Core Stack.
# 6.  Core Area.
# 7.  Flux Density.
# 8.  Coil Diameter and Core Limb Centre.
# 9.  Weight of Core.
# 10. Weight of HV and LV copper.
# 11. Winding Resistance and load loss.
# 12. No Load Loss.
# 13. No Load Current.
# 14. Percentage Reactance, resistance and Impedance.
# 15. Efficiency, maximum efficiency.
# 16. Regulation at 0.8 PF at rated load.
# 1. Primary Coil Working Density
S := 102 V*A
Vp := 220 V
Ip := S/(3*Vp) = 0.154545 A
Cd := 2.6*A/mm^2  # --> Assumed Current Density
A1 := Ip/Cd = 0.0594406 mm^2
D := sqrt(4*A1/π) = 0.275104 mm
# ==> Diameter after rounding off
D := 0.3 mm
# ==> Area of Proposed Conductor
Ap := π*D^2/4 = 0.0706858 mm^2
# ==> Working Current density
Cdp := Ip/Ap = 2.18637 A/mm^2
Copper_wound_constant := 0.37 V
Et := Copper_wound_constant*sqrt(102*10^-3)
Et = 0.118169 V
N1 := Vp/Et = 1861.75
Layers := 8
TURNS := N1/Layers
TURNS = 232.718
# Axial Build
bareconductor := D = 0.3 mm
gapbetweenconductor := 0.05 mm
dpc := 0.1 mm
total := bareconductor + gapbetweenconductor + dpc = 0.45 mm
axial := total*TURNS = 104.723 mm
# Radial Build
interlayerdistance := 0.2 mm
totalradial := bareconductor + dpc + gapbetweenconductor + interlayerdistance = 0.65 mm
Radial_build_HV := totalradial*Layers
Radial_build_HV = 5.2 mm
# 2. Window Height
toptoyoke := 2 mm
windowheight := axial + toptoyoke*2
windowheight = 108.723 mm
# 3. Secondary coil Working Current density
VsLL := 102 V
Vs1ϕ := VsLL/sqrt(3) = 58.8897 V
N2 := Vs1ϕ/Et = 498.354
SECONDARYLAYERS := 4
TURNPERLAYER := N2/SECONDARYLAYERS = 124.588
Is := S/(sqrt(3)*VsLL) = 0.57735 A
cd_secondary := 2.6 A/mm^2
Area_secondary := Is/cd_secondary = 0.222058 mm^2
diameter_secondary := sqrt(4*Area_secondary/π) = 0.531726 mm
Approximate_diameter := 0.6 mm
Proposed_conductor_area_secondary := π*Approximate_diameter^2/4 = 0.282743 mm^2
Working_Current_density := Is/Proposed_conductor_area_secondary = 2.04196 A/mm^2
# Axial Build
BARECONDUCTOR := Approximate_diameter = 0.6 mm
DPC := 0.1 mm
gapbetweencoductor := 0.05 mm
TOTAL := BARECONDUCTOR + DPC + gapbetweencoductor
AXIAL := TOTAL*TURNPERLAYER
AXIAL = 93.4413 mm
# Radial Build
INTERLAYERDISTANCE := 0.2 mm
TOTALRADIAL := BARECONDUCTOR + DPC + gapbetweencoductor + INTERLAYERDISTANCE
Radial_Build_LV := TOTALRADIAL*SECONDARYLAYERS = 3.8 mm
# 4. Core Diameter
B := 1.6 T
f := 50 Hz
stackingfactor := .97
Area_core := Et/(4.44*f*B*stackingfactor) = 342.971 mm^2
Gross_core_area := Area_core = 342.971 mm^2
Core_diameter := sqrt(4*Gross_core_area/(π*0.84)) = 22.8005 mm
# 5. Core Stack
L1 := 20 mm
L2 := 14 mm
L3 := 10 mm
K1 := sqrt(Core_diameter^2 - L1^2) = 10.9481 mm
k2 := sqrt(Core_diameter^2 - L2^2) = 17.9962 mm
K2 := k2 - K1 = 7.04802 mm
k3 := sqrt(Core_diameter^2 - L3^2) = 20.4905 mm
K3 := k3 - k2 = 2.49437 mm
K := K1 + K2 + K3 = 20.4905 mm
# 6. Core Area
TOTALGROSSCOREAREA := L1*K1 + L2*K2 + L3*K3 = 342.579 mm^2
TOTALGROSSCOREAREA = 342.579 mm^2
NETCOREAREA := 0.97*TOTALGROSSCOREAREA = 332.301 mm^2
# 7. Flux Density
Bm := Et/(4.44*f*TOTALGROSSCOREAREA*stackingfactor) = 1.60183 T
# 8. Coil Diameter and Core Limb Centre
Core_diameter = 22.8005 mm
Radial_Build_LV = 3.8 mm
Radial_build_HV = 5.2 mm
Radial_Gap_Core_to_LV := 1 mm
Radial_Gap_LV_to_HV := 1 mm
Gap_between_HV_limb_and_phase := 2 mm
LV_coil_inside_diameter := Core_diameter + 2*Radial_Gap_Core_to_LV = 24.8005 mm
LV_coil_outside_diameter := LV_coil_inside_diameter + 2*Radial_Build_LV = 32.4005 mm
HV_coil_inside_diameter := LV_coil_outside_diameter + 2.*Radial_Gap_LV_to_HV = 34.4005 mm
HV_coil_outside_diameter := HV_coil_inside_diameter + 2*Radial_build_HV = 44.8005 mm
Core_Limb_centre := HV_coil_outside_diameter + 2*Gap_between_HV_limb_and_phase
Core_Limb_centre = 48.8005 mm
# 9. Core Weight
DENSITYOFCOREMATERIAL := 7.65*gm/cm^3
Weight := (3*windowheight + 4*Core_Limb_centre) + (2*L1*0.86) = 555.772 mm
Core_weight := Weight*TOTALGROSSCOREAREA*DENSITYOFCOREMATERIAL*.97
Core_weight = 1.41283 kg
# 10. Weight of HV and LV copper
LV_coil_inside_diameter = 24.8005 mm
LV_coil_outside_diameter = 32.4005 mm
HV_coil_inside_diameter = 34.4005 mm
HV_coil_outside_diameter = 44.8005 mm
MEANOFLV := (LV_coil_inside_diameter + LV_coil_outside_diameter)/2
MEANOFLV = 28.6005 mm
MEANOFHV := (HV_coil_inside_diameter + HV_coil_outside_diameter)/2
MEANOFHV = 39.6005 mm
meanlengthofturnsLV := MEANOFLV*π = 89.8511 mm
meanlengthofturnsHV := MEANOFHV*π = 124.409 mm
LENGTHOFLV := meanlengthofturnsLV*N2 = 44777.6 mm
LENGTHOFHV := meanlengthofturnsHV*N1 = 231.617 m
SPECIFICGRAVITYofCopper := 8.98*gm/cm^3
WEIGHTOFLV := LENGTHOFLV*Area_secondary*SPECIFICGRAVITYofCopper
WEIGHTOFLV = 89.2901 gm
WEIGHTOFHV := LENGTHOFHV*Ap*SPECIFICGRAVITYofCopper
WEIGHTOFHV = 147.021 gm
# 11. Winding Resistance and load loss.
Resistivity_of_copper := 0.021 V*cm/A
RESISTANCEOFLV := Resistivity_of_copper*LENGTHOFLV*10^-6/Area_secondary
RESISTANCEOFLV = 0.0423462 Ω
RESISTANCEOFHV := Resistivity_of_copper*LENGTHOFHV*10^-6/Ap
RESISTANCEOFHV = 0.68811 Ω
LOADLOSS_PRIMARY := Ip^2*RESISTANCEOFHV
LOADLOSS_PRIMARY = 0.016435 W
LOADLOSS_SECONDARY := Is^2*RESISTANCEOFLV = 0.0141154 W
LOADLOSS_SECONDARY = 0.0141154 W
LOADLOSS := LOADLOSS_PRIMARY + LOADLOSS_SECONDARY
LOADLOSS = 0.0305504 W
# 12. No Load Loss
SPECIFICLOSS := 1 W/kg
LOSSPERKG := SPECIFICLOSS*1.25
NOLOADLOSS := LOSSPERKG*Core_weight
NOLOADLOSS = 1.76604 W
# 13. No Load Current
MAGNETISE := 1.6*V*A/kg
PERPHASEMAGNETISING := MAGNETISE*Core_weight/(3*Vs1ϕ) = 0.0127953 A
IM := PERPHASEMAGNETISING + 2*PERPHASEMAGNETISING = 0.0383858 A
IHNE := NOLOADLOSS/(3*Vs1ϕ)
NOLOADCURRENT := sqrt(IM^2 + IHNE^2)
NOLOADCURRENT = 0.0396661 A
# 14. Percentage Reactance, resistance and Impedance.
a := Radial_Gap_LV_to_HV = 0.1 cm
b1 := Radial_Build_LV = 0.38 cm
b2 := Radial_build_HV = 0.52 cm
f = 50 Hz
Average_stack_length_of_LV_and_HV := (axial + AXIAL)/2 = 99.0823 mm
Al := Average_stack_length_of_LV_and_HV
D := (MEANOFLV + MEANOFHV)/2 = 34.1005 mm
xpercent := 7.91*f*Is*N2^2*π*D/(Vs1ϕ*Al)*(a + (b1 + b2)/3)*10^-6
xpercent := 7.91*50*0.577*499^2*3.14*37.1/(58.89*100)*(0.2 + (0.38 + 0.52)/3)*10^-6
xpercent = 0.562025
RESISTANCE := LOADLOSS/S
PERCENTAGERESISTANCE := RESISTANCE*100
PERCENTAGERESISTANCE = 0.0299514
Z := sqrt(xpercent^2 + PERCENTAGERESISTANCE^2)
Z = 0.562822
# 15. Efficiency, Maximum efficiency.
EFFICIENCY := S*100/(S + LOADLOSS + NOLOADLOSS) = 98.2691
kk := sqrt(NOLOADLOSS/LOADLOSS) = 7.60311
max_efficiency := S*kk*100/(S*kk + NOLOADLOSS + LOADLOSS*kk^2) = 99.5466
# 16. Regulation at 0.8 PF at Rated Load.
n := 1
Regu := (n*xpercent*cos(36.86 deg) - n*xpercent*sin(36.86 deg))/200 = 0.000562704
Regulation := xpercent*sin(36.86 deg) + PERCENTAGERESISTANCE*cos(36.86 deg) + Regu = 0.361664
